# Лабораторная  работа № 1
1
3/(4 + 5^2) = 0.103448
# Проведение простых вычислений. Функции и их таблицы и графики.
(3*4 + 5^2)/(7 + sqrt(8 + 1)) = 3.7
# 1. Проведение простых вычислений.
# Напечатайте  выражение 3/4+5^2= , для того чтобы покинуть знаменатель следует нажать клавишу  [Space]=[Пробел], затем [=],  тогда получится
t := 0, 1 .. 10
h(t) := g/2*t^2
3/(4 + 5^2) = 0.103448
t1(t) := t
# Напечатайте  выражение
(3*4 + 5^2)/(7 + sqrt(8 + 1)) = 3.7
t1(t) = [0; 1; 2; 3; 4; 5; 6; 7; 8; 9; 10]
h(t) = [0; 4.90332; 19.6133; 44.1299; 78.4532; 122.583; 176.52; 240.263; 313.813; 397.169; 490.332] m/s^2
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# Для набора знака корня щелкните кнопку
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# на
# из окна
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# выберите знака корня.
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# Используя последнее окно получите числовые выражения (не менее 10), в которые входили бы операторы и функции из этого окна.
#
# 2.  Функции и их таблицы и графики.
#
# Определение переменных рассмотрим на примере уравнения движения свободно падаюшего тела в поле тяжести.  Определим переменную время t, где знак  присвоения значения := вводитcя одной клавишой [:/;/ж]
2
(sqrt(sin(π/4)) + (4 + 1))/(ln(e^(4 + 2)) + (4 + 4))^2 = 0.0298005
3
x := 1 .. 15
t := 10  # аналогично вводим значение ускорения
g := 9.8  # 9 variant
y(x) := 3 - 3*ln(x/(x + 4))
# Высота падения тела определяется выражением
x1(x) := x
g/2*t^2 = 490
y(x) = [7.82831; 6.29584; 5.54189; 5.07944; 4.76336; 4.53248; 4.35596; 4.2164; 4.10317; 4.00942; 3.93046; 3.86305; 3.80479; 3.75394; 3.70917]
# Проведем расчет таблицы значений функции, в нашем  случае зависимости h(t).  Для этого определим диапазон изменения аргумента t от 0 до 10 с шагом 1. Наберем
# на клавиатуре, где символ .. получается нажатие на клавишу [;]
x1(x) = [1; 2; 3; 4; 5; 6; 7; 8; 9; 10; 11; 12; 13; 14; 15]
t := 0, 1 .. 10
# Определим функцию h(t) как
h(t) := g/2*t^2
t1(t) := t
t1(t) := t
t1(t) = [0; 1; 2; 3; 4; 5; 6; 7; 8; 9; 10]
h(t) = [0; 4.9; 19.6; 44.1; 78.4; 122.5; 176.4; 240.1; 313.6; 396.9; 490]
# Для получения таблицы функции набираем h(t) и клавишу [=]
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x := 2 .. 15
# Для построения графика функции, в нашем  случае зависимости h(t), на свободном месте экрана  щелкните левой кнопкой мышки, а затем используем опцию Insert главного меню. Из выпавшего меню выбираем опции  Graph, затем X-Y Plot. В поле ввода под осью абсцис помещаем переменную t, а в поле ввода слева от оси ординат помещаем  функцию h(t).
x1(x) := x
# 8 variant
y(x) := e^(2*(x - 1))/(2*(x - 1))
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x1(x) = [2; 3; 4; 5; 6; 7; 8; 9; 10; 11; 12; 13; 14; 15]
y(x) = [3.69453; 13.6495; 67.2381; 372.62; 2202.65; 13562.9; 85900.3; 555382; 3647776; 24258260; 162950584; 1.10371e9; 7.52806e9; 5.1652e10]
# После щелчка кнопкой мышки Mathcad вычисляет и строит график
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# 3. Сохранение рабочего документа
# Для отчета по выполненой работе необходимо сохранить рабочий документ, содержание которого составляет выполненное задание. Для этого  используем опцию File главного меню. Из выпавшего меню выбираем опции  Save. В поле диалогового окна введите имя файла.
# Желательно сохранение этого файла на дискете, для чего скопируйте сохранненый файл на дискетку.
# 4. Порядок выполнения работы
# 1. Ознакомтесь с 1 и 2-м разделом описания лабораторной работы и выполните указанные действия самостоятельно. Все результаты необходимо сохранить как рабочий документ.
#
# 2.  Провести простые вычисления, указанные в пункте 1.
# Вычислить выражение, где n=№ стола.
#
# (sqrt(sin(π/4)) + (4 + 1))/(ln(e^(4 + 2)) + (4 + 4))^2=
#
# 3. ВВычислить  табличные значения указанных ниже функций и построить их графики. Самостоятельно определите диапазон изменения аргумента, что бы отразить в этом диапазоне характерное изменение функции, и его шаг так, что бы количество точек не привышали 100.
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