# Лабораторная  работа № 2
1
x := 3
f(x) := x^3 - e^x
# Решение уравнений
a := root(x^3 - e^x, x)
# 1.Решение одного уравнений.
a = 1.85718
# Для решения  одного уравнений с одним неизвестным используется функция root(f(z),z), которая возвращает значение Z, при котором выражение или функция f(z) обращается в 0. Рассмотрим как найти a - решение  уравнения exp(x)=x^3.
#
# 1) Вводим предполагаемое начальное значение a
a^3 - e^a = 4.28884e-11
x := 1
y := 1
Given
x := 3
x^2 + y^2 == 6
# 2) Перепишем f(x) в виде f(x)=
x^3 - e^x
x + y == 2
# 3) Определим переменную a как
a := root(x^3 - e^x, x)
x ≤ 1
y > 2
# 4) Найдем корень
a = 1.85718
# 5) Проверка найденного решения
a^3 - e^a = 4.28884e-11
Find(x, y) = [-0.414214; 2.41421]
# 2. Решение системы уравнений.
#
# Найдем точки пересечения окружности и прямой.
#
# Начальные значения
x^3 - 10*x + 2
x := 1
y := 1
v := [2; -10; -0; 1]
# Печатаем ключевое слово Mathcad
Given  # ,
# которое указывает, что далее следует система уравнений. Для набора в системе символа = используйте [Cntr]=
polyroots(v) = [-3.2579; 0.20081; 3.05709]
x^2 + y^2 == 6  # Окружность
x + y == 2  # Прямая
2
n := 9
x ≤ 1  # Ограничения в виде неравенств
f(x) := x^3 + n^2 - e^((n + 1)*x)
y > 2
# Условие меньше или равно вводится комбинацией клавиш [Cntr]9, меньше  <.
a := root(x^3 + n^2 - e^((n + 1)*x), x)
a = 0.43955
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# Для набора матрицы используйте икону
# в окне Инструментария.
n := 8
f(x) := x^3 + n^2 - e^((n + 1)*x)
[xval; yval] := Find(x, y)
a := root(x^3 + n^2 - e^((n + 1)*x), x)
# Решение:
a = 0.462269
xval = -0.414214
yval = 2.41421
3
n := 1
# x^2+ny^2=5n^2
# x+(n+2)y=n^3
# Проверка найденного решения
Given
sqrt(5 - x^2) == y
xval^2 + yval^2 = 6
xval + yval = 2
(1 - x)/3 == y
# 3. Нахождение корней полиномов
Find(x, y) = [-2; 1]
x := -3, -2.9 .. 3
z := -3 .. 3
# Функция polyroots(v) возвращает корни полинома степени n. Коэффициенты полинома находятся в векторе v длиной  n+1. Возвращает вектор длиной  n, состоящий из корней полинома.
f(x) := sqrt(5 - x^2)
y(z) := (1 - z)/3
4
n := 9
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x^3 - 10*x + 2
x^3 - 10*x + 2  # Полином
# Коэффициенты полинома  в векторе v длиной  n+1. Сюда входят все коэффициенты, в том числе равные нулю.
v := [n + 1; 0; n^2; 6*n]
v := [2; -10; -0; 1]
# Возвращает сразу все ответы
polyroots(v) = [-3.2579; 0.20081; 3.05709]
polyroots(v) = [-3.2579; 0.20081; 3.05709]
n := 8
# 3. Порядок выполнения работы
x^3 - 10*x + 2
# 1. Ознакомтесь с описанием лабораторной работы и выполните указанные действия самостоятельно. Все результаты необходимо сохранить как рабочий документ.
#
# 2.  Решить уравнение exp((n+1)x)=x^3+n^2,
# где n - № варианта.
# Предварительно определить графически приближенное значение двух корней этого уравнения.
# Проверить найденное решение.
#
# 3.  Решить систему уравнений  x^2+ny^2=5n^2
# x+(n+2)y=n^3
#
# Определить графически приближенное значение двух пар корней.
# Если из графиков следует, что система уравнений не имеет решения, найти подбором значение n, при котором решения существуют.
# Проверить найденное решение.
#
# 4. Найти корни полинома c коэффициентами
#
# v=[(n+1), 0, 2*n^2, 6*n].
#
# Проверить найденное решение.
v := [n + 1; 0; n^2; 6*n]
polyroots(v) = [-1.42559; 0.0461297 - 0.359717i; 0.0461297 + 0.359717i]
