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# 9 variant
# 8 variant
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1
3
f(x) := (x - 1)*(x + 3)^2
4  # a  # DOF - any number
1
3
y(x) := x^4 - 2*x^2 + 8
b
y(x) := x^3 + 5*x^2 + 3*x - 9
d/dx((x - 1)*(x + 3)^2) → (x + 3)^2 + 2*(x - 1)*(x + 3)  # function is not odd
d/dx(x^4 - 2*x^2 + 8) → 4*x^3 - 4*x
# function is not even
((x + 3)^2 + 2*(x - 1)*(x + 3)) == 0
4*x^3 - 4*x == 0
k := -5, -4.9 .. 9
y(k) = [
    -24; -21.299; -18.792; -16.473; -14.336; -12.375; -10.584; -8.957; -7.488; -6.171
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]
[-3; -1/3]  # - extremum points
-roots
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[0; 1; -1]
f(-3) = 0
# extremum points
# (-3;0)
# (-1/3;-9.481)
f(x) := x^4 - 2*x^2 + 8
f(-1/3) = 7.79012
f(-1) = 7
f(0) = 8
d/dx((x + 3)^2 + 2*(x - 1)*(x + 3)) → 6*x + 10
f(1) = 7
# extremum points
# (-1;7)
# (0;8)
# (1;7)
6*x + 10 == 0
# -5/3 | Inflection poin , roots
c
# function is continuous
d/dx(4*x^3 - 4*x) → 12*x^2 - 4
(-5/3, ∞) - vognutaya
# no break points
12*x^2 - 4 == 0
x := -3
(-∞, -5/3) - vipuklaya  # d
x := 1
2
f(x) := (x + 3)^2 + 2*(x - 1)*(x + 3)
[1/3*3^(1/2); -1/3*3^(1/2)] - roots  # , infection points
limit((x - 1)*(x + 3)^2, x → ∞) → ∞
x := -4  # -infinitive to -3
e
f(x) = 11
(-∞, -sqrt(3)/3)  # and
(sqrt(3)/3, ∞)
-vognutaya
# no asymptotes
x := -1  # -3 to -1/3
(-sqrt(3)/3, sqrt(3)/3)
-vipuklaya
f(x) = -4
2
x := 2  # -1/3 to infinitive
f(x) := x^4 - 2*x^2 + 8
f(x) = 16
# -1, 1 - min points
# -infinitive to -3 - increase | 0 - max point
# 5. Порядок выполнения работы | -3 to -1/3 - decrease | (-∞, 1) | and | (0, 1) | - increase
# -1/3 to infinitive - increase | (-1, 0) | and | (1, ∞) | -decrease
# 1. Ознакомьтесь с разделом описания лабораторной работы и выполните указанные действия самостоятельно. Все результаты необходимо сохранить как рабочий документ.
#
# 2. Исследуйте, по выше приведенному плану, поведение указанных ниже функций, и постройте их графики. Самостоятельно определите диапазон изменения аргумента, что бы отразить в этом диапазоне характерное изменение функции, и его шаг так, что бы количество точек не превышали 100. Выбор функции по соответствию номера ФИО в списке группы у преподавателя номеру строки в списке  функций.
4
f(x) := x^4 - 2*x^2 + 8
k := -2, -1.9 .. 2
f(k) = [
    16; 13.8121; 12.0176; 10.5721; 9.4336; 8.5625; 7.9216; 7.4761; 7.1936; 7.0441
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]
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# 1 | 2 | 3
y(x) := (x + 2)/e^x
y(x) := (x^2 - 3*x + 2)/(x + 1)^2
1.
y(x) := x^4 - 2*x^3 - 8
2
y(x) := x^3/3 - 3*x^2/2 + 2*x + 1
y(x) := e^x/(1 - x)
y(x) := x^4/(x + 1)^3
3
y(x) := x^3 - 3*x^2
y(x) := e^(1/(x + 1))
y(x) := (4 - x)/(9*(2 - x))
4
y(x) := x^2/(1 - x)
a
DOF
# -any number
y(x) := x^5 - 5*x + 3
y(x) := e^(1/(1 - x))
f(x) := (-x)^4 - 2*(-x)^2 + 8 == x^4 - 2*x^2 + 8
y(x) := ln(x)/x
y(x) := x^2/(x - 2)
b
y(x) := (x - 1)/(x + 3)
5
# function is odd
y(x) := x/ln(x)
y(x) := x^3/(1 - x^2)
c
# function is continuous
6
y(x) := (x + 2)^2/(x - 1)
# no break points
y(x) := (x - 2)/(x - 2)^2
y(x) := x*ln(x)
7
y(x) := 3*x^4 - 4*x + 1
d
x := 0
y := 8
8
y(x) := x^3*ln(x)
y(x) := x^2/(x - 1)^2
y(x) := x^4 - 2*x^2 + 8
limit((x^2 - 2*x^2) + 8, x → ∞) → -∞
y(x) := e^(-x)*(x + 4)
y(x) := 4*x/(x - 2)^2
9
y(x) := (x - 1)*(x + 3)^2
# no asymptotes
y(x) := x/(x^2 - 4)
y(x) := ln(2*x^2 + 3)
10
y(x) := x^4 - 4*x^2 + 5
y(x) := e^x*(x + 2)
y(x) := x^3/(2*(x + 1))
11
y(x) := (x + 1)^2*(x - 1)^2
y(x) := x^3/(x^2 - 1)
y(x) := ln(9 - x^2)
12
y(x) := x^3 - 3*x + 3
y(x) := (x - 1)*e^(3*x + 1)
y(x) := x^4 - 2*x^2 + 1
13
y(x) := 4/(x^2 - 4*x + 3)
y(x) := e^(1/x)
y(x) := (x^2 + x)/(x - 1)
14
y(x) := x^4 - 4*x^2 + 3
15
y(x) := x^3 - 3*x + 1
y(x) := x*e^x
y(x) := (x^2 + 1)/(x^2 - 1)
16
y(x) := (x + 2)^2*(x + 4)^2
y(x) := (x - 1)/e^x
y(x) := x^3/(12*(x - 2))
17
y(x) := 3*x^4 - 4*x^3 + 1
y(x) := x*(ln(x) - 3)
y(x) := x/(1 - x^2)
y(x) := (x - 2)/(x + 3)^2 - 1
18
y(x) := x^3 - 12*x^2 + 36*x
y(x) := ln(x^2 + 1)
y(x) := x/e^x
y(x) := x/(x - 2)^2
19
y(x) := 2 + x^2 - x^4/4
y(x) := 1/(x^2 - 3*x + 2)
y(x) := x^3*e^(-x)
y(x) := x^4/4 - 2*x^2
20
y(x) := x/(x^2 - 1)^(1/3)
y(x) := ln(x^2 - 4)
21
y(x) := x^3 - 3*x^2 + 2
y(x) := x/(x + 2)^2
y(x) := x^5/5 - x^3/3
y(x) := x^2*e^(-x)
22
y(x) := x^3 - 12*x
y(x) := x^2 - 2*ln(x)
y(x) := (x - 3)^2/(4*(x - 1))
23
y(x) := 2*x^2/(4*x^2 - 1)
y(x) := 4*x^2 - x^4 - 3
y(x) := ln(x^2 + 4*x)
24
y(x) := ln(x)/x^(1/2)
y(x) := (2*x + 1)/x^2
y(x) := x^3/3 - 4*x + 3
25
y(x) := x/(3 - x^2)
y(x) := x^2*(ln(x) - 1)
y(x) := (x + 1)^2*(x + 2)
26
y(x) := 3/(x^2 - 5*x + 4)
y(x) := (x - 1)^2*(x + 3)
y(x) := ln(16 - x^2)
27
